New Capacitor.ic29 bus1=p1imv39 phases=3 Kv=12.47 conn=Wye Kvar=300.0

New CapControl.ic29 Capacitor=ic29 Element=Line.padswitch(r:idt1112-p1imv39)i_17304 Terminal=1 delay=100.0 Type=voltage Vmin=120.5 Vmax=125.0 Ptratio=59.99631547328862 Ctratio=100.0
